# AguaClara Water Treatment Plants
# Automated Design
# Add variable descriptions next to every varible so it is easy to interpret what this all means.
# Design References
# MathCAD dimension calculations:
# [reference: BasicInputs.xmcd]
# Use BasicClientInputs and ExpertClientInputs when this is run by LabVIEW.
# Use BasicInputs and ExpertInputs to use the program in MathCAD
# Change the reference by
# - right clicking
# - select properties
# - reference tab
# - type in the correct file name
# [reference: ExpertInputs.xmcd]
# [reference: DesignAssumptions.xmcd]
# [reference: MathFunctions.xmcd]
# [reference: PipeDatabase.xmcd]
# [reference: MinorLossCoefficients.xmcd]
# [reference: FluidsFunctions.xmcd]
# [reference: Sedimentation Tank.xmcd]
# [reference: Flocculator.xmcd]
# [reference: Rapid Mix.xmcd]
# [reference: LFOM.xmcd]
# [reference: EntranceTankDim.xmcd]
# [reference: LinearCdc_app37.xmcd]
# [reference: ChemStorageCylinders.xmcd]
# [reference: Materials List.xmcd]
# [reference: SRSF jcw57.xmcd]
# AutoCAD drawing programs:
# Translators:
# These are the codes that take MathCAD outputs and create AutoCAD scripts that are used to draw the plant (formerly Basics)
# [reference: MtoATranslators.xmcd]
# The wrapped MtoA translator contains the functions that the user will want to access. These functions will draw pieces with full functionality - specifying the location, dimension, and orientation of the object. Also, it contains layer control and subtraction capabilities for grouped objects.
# [reference: MtoATranslators Wrapped.xmcd]
# Plant Elements:
# These are all of the files that draw the fundamental parts of the plants (tees, elbows, tanks, pipes, etc)
# [reference: Channel.xmcd]
# [reference: cross.xmcd]
# [reference: Sludge.xmcd]
# [reference: Manifold.xmcd]
# [reference: pipe.xmcd]
# [reference: elbow.xmcd]
# [reference: Tee.xmcd]
# [reference: tank.xmcd]
# [reference: lamina.xmcd]
# [reference: adapter.xmcd]
# [reference: Tee2.xmcd]
# [reference: pvccap.xmcd]
# [reference: LaunderCap.xmcd]
# [reference: ChimneyStops.xmcd]
# [reference: laminaplain.xmcd]
# [reference: Stairs.xmcd]
# [reference: DrainChannel.xmcd]
# [reference: Manifold.xmcd]
# Specific Pieces:
# These are the codes that draw the bigger pieces of the plant (the sed tank, floc tank, etc)
# [reference: floctank.xmcd]
# [reference: chlorinestock.xmcd]
# [reference: SedTank- with pieces.xmcd]
# [reference: Entrance Tank.xmcd]
# [reference: ChemStockCylinders.xmcd]
# [reference: Plant Drain Channel.xmcd]
# [reference: Operator Access.xmcd]
# [reference: SRSF.xmcd]
# Layouts:
# This file will execute at the very end to create multiple views of the entire plant in paperspace
# [reference: Layouts.xmcd]
# [component: inputs AC_FlocTank]
# Sed Tanks and Slopes:
N_SedTanks = 2
H_SedBetween = 0 cm  # Distance from the top of the inlet manifold to the bottom of the ledge supporting the lamella frame
L_Sed = 6.55013 m
innerD(ND_FlocValve, EN_PipeSpec)/2 = 0.0525018 m
N_SedBays = 2  # Number of bays of inlet manifolds in each sed tank
# Length of the port through which water exits the inlet manifold
outerradius(ND_FlocValve) = 0.04445 m
# Width of ferrous cement plates in whice one manifold port is cut
Q_SedBay = 5.5 L/s
ND_FlocValve = 3 in
# Sedimentation Tank Sludge Drain:
N_SedSludgeOrifices = 65  # per cell
Ti_SludgeDrain = 30 min  # Tank Drain time
W_SedSludge = 12.8654 cm  # Width of the sludge channel
B_SedSludgeOrifices = 10 cm  # Distance center to center between drain orifices
H_SedSludge = 6.43271 cm  # Depth of the sludge channel
T_SedSludge = 5 cm
T_SedSludge = 5 cm
# Thickness of the plate topping the sludge channel
# through which drain holes are formed
W_SedDrainCover = 22.8654 cm
D_SedSludgeOrifice = 0.01 m  # Diameter of drain orifices
W_SedInletBottom = 0.425673 m
N_SedSludgeOrifices = 65
ND_SedSludgeValve = 3 in
# Sedimentation Tank Dimensions:
Z_SedSludge = 0.114327 m  # Height from 0 of the top of the sludge drain
Z_SedSlopes = 0.808313 m  # Height from 0 of the top of the inlet manifold
W_Sed = 2.16 m  # Total tank wall height
L_Sed = 6.55013 m  # Total tank length
# Inlet Channel:
HW_InletChannel = 0.331806 m  # Width of the drop chimneys connecting channel to sed inlet manifolds
W_InletChannel = 0.481806 m  # length of drop chimmneys
L_Channel = 4.77 m
N_SedInletPipes = 2  # per sed bay
H_InletChannel = 0.431806 m
# Sedimentation Tank Effluent Launder:
N_SedLaunderOrifices = 108  # Number of orifices per launder
Q_SedLaunderOrifices = 5.16317e-5 m^3/s  # More Launder Dimensions
ND_SedLaunder = 6 in
B_SedLaunderOrifices = 0.0932675 m  # Center to center launder spacing
L_SedLaunder = 5.20856 m
# Exit Channel:
D_SedLaunderOrifice = 0.433071 in
W_ExitChannel = 0.470048 m
H_ExitChannel = 0.431806 m
L_ExitChannel = 4.77 m
H_PltWeir = 0.341806 m  # height of the weir carrying water to the distribution tank
HW_ExitChannel = 0.291806 m  # water height in exit channel from 0
# Lamella:
L_SedPlate = 0.522571 m
B_SedPlate = 2.98112 cm  # center to center distance between lamella
S_SedPlate = 2.78112 cm  # spacing between lamella
N_SedPlates = 150  # Number of Sed Plates per Sedimentation Tank Bay.
AN_SedPlate = 60 deg
V_SedC = 9.99775 m/day
L_SedActive = 5.16345 m
T
V_SedUp = 67.1742 m/day
Z_SedLaunder = 1.48327 m
H_SedPlate = 0.45256 m
H_SedAbove = 0.226595 m  # Height of water needed above the lamella
N_SedPlates = 150
HW_Sed = 1.62573 m
H_Sed = 1.72573 m
Z_Mp = 1.29392 m
H_SedBayDivider = 0.808313 m
# Flocculator: | Look at Flocculator Positioning arrays
W_FlocChannel = 0.54 m
# Fill last channel with bafffles from last channel
# Fix port width to be based on energy dissipation in that channel
ED_Floc = 6 mW/kg
# Adjust spacing after the number of baffles per channel is known.
# Check the residence time of the flocculator should be at least 20minutes
HW_FlocEnd = 1.62573 m
X_FlocBaffles = [
    0.289339, 0.289339, 0.289339, 0.351806;
    0.560678, 0.560678, 0.560678, 0.633091;
    0.832016, 0.832016, 0.832016, 0.914376;
    1.10336, 1.10336, 1.10336, 1.19566;
    1.37469, 1.37469, 1.37469, 1.47695;
    1.64603, 1.64603, 1.64603, 1.75823;
    1.91737, 1.91737, 1.91737, 2.03952;
    2.18871, 2.18871, 2.18871, 2.3208;
    2.46005, 2.46005, 2.46005, 2.60209;
    2.73139, 2.73139, 2.73139, 2.88337;
    3.00273, 3.00273, 3.00273, 3.16466;
    3.27407, 3.27407, 3.27407, 3.44594;
    3.5454, 3.5454, 3.5454, 3.72723;
    3.81674, 3.81674, 3.81674, 4.00851;
    4.08808, 4.08808, 4.08808, 4.2898;
    4.35942, 4.35942, 4.35942, 4.57108;
    4.63076, 4.63076, 4.63076, 4.85237;
    4.9021, 4.9021, 4.9021, 5.13365;
    5.17344, 5.17344, 5.17344, 5.41494;
    5.44478, 5.44478, 5.44478, 5.69622;
    5.71611, 5.71611, 5.71611, 5.97751;
    5.98745, 5.98745, 5.98745, 6.25879;
    6.25879, 6.25879, 6.25879, 0
] m
L_FlocBaffles = [
    1.22172, 1.22172, 1.22172, 1.48961;
    1.48961, 1.48961, 1.48961, 1.22172;
    1.22172, 1.22172, 1.22172, 1.48961;
    1.48961, 1.48961, 1.48961, 1.22172;
    1.22172, 1.22172, 1.22172, 1.48961;
    1.48961, 1.48961, 1.48961, 1.22172;
    1.22172, 1.22172, 1.22172, 1.48961;
    1.48961, 1.48961, 1.48961, 1.22172;
    1.22172, 1.22172, 1.22172, 1.48961;
    1.48961, 1.48961, 1.48961, 1.22172;
    1.22172, 1.22172, 1.22172, 1.48961;
    1.48961, 1.48961, 1.48961, 1.22172;
    1.22172, 1.22172, 1.22172, 1.48961;
    1.48961, 1.48961, 1.48961, 1.22172;
    1.22172, 1.22172, 1.22172, 1.48961;
    1.48961, 1.48961, 1.48961, 1.22172;
    1.22172, 1.22172, 1.22172, 1.48961;
    1.48961, 1.48961, 1.48961, 1.22172;
    1.22172, 1.22172, 1.22172, 1.48961;
    1.48961, 1.48961, 1.48961, 1.22172;
    1.22172, 1.22172, 1.22172, 1.48961;
    1.48961, 1.48961, 1.48961, 1.22172;
    1.22172, 1.22172, 1.22172, 0
] m
Z_FlocBaffles = [
    0, 0, 0, 0.418928;
    0.404008, 0.404008, 0.404008, 0;
    0, 0, 0, 0.418928;
    0.404008, 0.404008, 0.404008, 0;
    0, 0, 0, 0.418928;
    0.404008, 0.404008, 0.404008, 0;
    0, 0, 0, 0.418928;
    0.404008, 0.404008, 0.404008, 0;
    0, 0, 0, 0.418928;
    0.404008, 0.404008, 0.404008, 0;
    0, 0, 0, 0.418928;
    0.404008, 0.404008, 0.404008, 0;
    0, 0, 0, 0.418928;
    0.404008, 0.404008, 0.404008, 0;
    0, 0, 0, 0.418928;
    0.404008, 0.404008, 0.404008, 0;
    0, 0, 0, 0.418928;
    0.404008, 0.404008, 0.404008, 0;
    0, 0, 0, 0.418928;
    0.404008, 0.404008, 0.404008, 0;
    0, 0, 0, 0.418928;
    0.404008, 0.404008, 0.404008, 0;
    0, 0, 0, 0
] m
N_FlocChannels = 4
L_FlocTank = 26.2005 m
HL_Floc = 21.7893 cm
HW_FlocStart = 1.84362 m
S_FlocBaffle = [26.9339; 26.9339; 26.9339; 27.9285] cm
B_FlocBaffle = [27.1339; 27.1339; 27.1339; 28.1285] cm
N_FlocChannelBaffles = [23; 23; 23; 22]
W_FlocPort = [0.269339; 0.269339; 0.269339; 0.282875] m
HL_FlocChannels = [5.59952; 5.59952; 5.59952; 4.99079] cm
L_FlocBaffleLower = 1.22172 m
L_FlocBaffleUpper = 1.48961 m
H_FlocPort = [0.54; 0.54; 0.54; 0.533146] m
Ti_Floc = 17.4252 min  # residence time of the flocculator
N_FlocBaffles = 91
# Materials List:
N_Launders = 4
L_LaunderPipeTotal = 20.8343 m
N_Valves = 4
N_LaunderCouplings = 4
N_ValveCouplings = 4
N_SedPlatesTotal = 600
N_SedPlatesPerSheet = 7
N_SedPlateSheets = 86
AC_SedTank =  # no stored result
AC_EntranceTank =  # no stored result
AC_FlocTank = [
    "-layer m FlocTank"; "c t 132,132,132"; "FlocTank"; "  "; "_-view o t _zoom w 0.16,4.46,0 -6.71013,7.39,1.94362 _box 0,4.62,0 -6.55013,7.23,1.94362 _box 0.15,4.47,-0.15 -6.70013,7.38,1.94362 _subtract 0.15,4.47,-0.15  0,4.62,0 "; "_box -6.70013,5.16,0 0.15,5.31,1.94362"; "_box -6.70013,5.85,0 0.15,6,1.94362"; "_box -6.70013,6.54,0 0.15,6.69,1.94362"; "-group c FlocTank y "; "all "
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]
AC_ChemTanks = [
    "-layer m CoagTanks"; "c t 132,132,132"; "CoagTanks"; "  "; "_-view o t"; "_cylinder -7.54888,9.84215,2.97814 0.3098 1.0718"; "_cylinder -7.54888,9.84215,2.98314 0.3048 1.0668"; "_-view o t"; "_subtract -7.85868,9.84215,2.97814  -7.85368,9.84215,2.97814 "; "-group c CoagTanks y "
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]
AC_OperatorAccess = [
    "-layer m AlumPlatform"; "c t 132,132,132"; "AlumPlatform"; "  "; "_-view o f"; "_pline"; "-9.08788,2.97814"; "-8.78788,2.97814"; "-8.78788,2.78264"; "-8.48788,2.78264"
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]
AC_DrainChannel = [
    "-layer m DrainChannel"; "c t 214,214,214"; "DrainChannel"; "  "; "3dpoly"; "0.3,-1.125,-0.2786"; "0.3,-1.125,-0.37252"; "0.3,-0.725,-0.61644"; "0.3,-0.325,-0.37252"; "0.3,-0.325,-0.2786"
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]
